# Hexapod 2G
# Обратная задача кинематики
# Константы (длины звеньев)
# Точка назначения
# (координаты конца лапы)
OA := 37
AB := 44
BC := 83
Destination := [-50; -50; -50]
x := Destination[0] = -50
y := Destination[1] = -50  # Решение для задней левой лапы
z := Destination[2] = -50
p := sqrt(x^2 + y^2) = 70.7107
OC := sqrt(p^2 + z^2) = 86.6025
AC := sqrt((p - OA)^2 + z^2) = 60.3027
Qrad := atan(z/(p - OA)) = -0.977587
Q0rad := acos((AB^2 + AC^2 - BC^2)/(2*AB*AC)) = 1.82152
q0rad := atan(y/x) + π = 3.92699
q1rad := Qrad + Q0rad = 0.84393
q2rad := acos((AB^2 + BC^2 - AC^2)/(2*AB*BC)) = 0.780763
q0real := q0rad*180/π = 225
q1real := q1rad*180/π = 48.3537
q2real := q2rad*180/π = 44.7344
q0 := q0real - 135 = 90
q1 := q1real + 90 = 138.354
q2 := q2real = 44.7344
Ap := OA
Bp := OA + AB*cos(q1rad) = 66.2394
Cp := p = 70.7107
Ax := OA*cos(q0rad) = -26.163
Bx := Bp*cos(q0rad) = -46.8383
Cx := x = -50
Ay := OA*sin(q0rad) = -26.163
By := Bp*sin(q0rad) = -46.8383
Cy := y = -50
Az := 0
Bz := AB*sin(q1rad) = 32.8795
Cz := z = -50
CoordX := [0; Ax; Bx; Cx] = [0; -26.163; -46.8383; -50]
CoordY := [0; Ay; By; Cy] = [0; -26.163; -46.8383; -50]
CoordZ := [0; Az; Bz; Cz] = [0; 0; 32.8795; -50]
CoordP := [0; Ap; Bp; Cp] = [0; 37; 66.2394; 70.7107]
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# Решение прямой задачи кинематики
q0 := 90
q0real := q0 + 135 = 225
q1 := 90
q1real := q1 - 90 = 0
q2 := 90
q2real := q2 = 90
q0rad := q0real*π/180 = 3.92699
q1rad := q1real*π/180 = 0
q0 := 90
q1 := 90
q2rad := q2real*π/180 = 1.5708
q2 := 90
Bp := OA + AB*cos(q1rad) = 81
Cp := Bp + BC*cos(π - q1rad - q2rad) = 81
Ap := OA = 37
Ax := Ap*cos(q0rad) = -26.163
Bx := Bp*cos(q0rad) = -57.2756
Cx := Cp*cos(q0rad) = -57.2756
Ay := Ap*sin(q0rad) = -26.163
By := Bp*sin(q0rad) = -57.2756
Cy := Cp*sin(q0rad) = -57.2756
Az := 0
Bz := AB*sin(q1rad) = 0
Cz := Bz - BC*sin(π - q1rad - q2rad) = -83
Cx = -57.2756
CoordY := [0; Ay; By; Cy] = [0; -26.163; -57.2756; -57.2756]
CoordX := [0; Ax; Bx; Cx] = [0; -26.163; -57.2756; -57.2756]
Cy = -57.2756
CoordZ := [0; Az; Bz; Cz] = [0; 0; 0; -83]
CoordP := [0; Ap; Bp; Cp] = [0; 37; 81; 81]
Cz = -83
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INgrad := 180/π
INrad := π/180
a := atan(-50/(-50))
a := -2.3561945
135*INrad = 2.35619
0.785 - 2.3561945 = -1.57119
1.571*INgrad = 90.0117
atan(-50/(-50)) = 0.785398
atan(50/(-50)) = -0.785398
atan(25/50) = 0.463648
