# Hexapod 2G
# Обратная задача кинематики
# Константы (длины звеньев)
# Точка назначения
# (координаты конца лапы)
# Версия 1
OA := 37
AB := 44
BC := 83
Destination := [90; -55; -50]  # Версия 2
OA := 41.5
AB := 44
BC := 81.32
x := Destination[0] = 90
y := Destination[1] = -55  # Решение для задней правой лапы
z := Destination[2] = -50
p := sqrt(x^2 + y^2) = 105.475
OC := sqrt(p^2 + z^2) = 116.726
AC := sqrt((p - OA)^2 + z^2) = 81.1962
Qrad := atan(z/(p - OA)) = -0.663392
Q0rad := acos((AB^2 + AC^2 - BC^2)/(2*AB*AC)) = 1.29934
q0rad := atan(y/x) = -0.548549
q1rad := Qrad + Q0rad = 0.635951
q2rad := acos((AB^2 + BC^2 - AC^2)/(2*AB*BC)) = 1.29392
q0real := q0rad*180/π = -31.4296
q1real := q1rad*180/π = 36.4373
q2real := q2rad*180/π = 74.1364
q0 := q0real + 135 = 103.57
q1 := q1real + 90 = 126.437
q2 := q2real = 74.1364
Ap := OA
Bp := OA + AB*cos(q1rad) = 76.8983
Cp := p = 105.475
Ax := OA*cos(q0rad) = 35.4112
Bx := Bp*cos(q0rad) = 65.6159
Cx := x = 90
Ay := OA*sin(q0rad) = -21.6402
By := Bp*sin(q0rad) = -40.0986
Cy := y = -55
Az := 0
Bz := AB*sin(q1rad) = 26.1335
Cz := z = -50
CoordY := [0; Ay; By; Cy]
CoordX := [0; Ax; Bx; Cx]
CoordZ := [0; Az; Bz; Cz] = [0; 0; 26.1335; -50]
CoordP := [0; Ap; Bp; Cp] = [0; 41.5; 76.8983; 105.475]
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# Решение прямой задачи кинематики
q0 := 90
q0real := q0 - 135 = -45
q1 := 90
q1real := q1 - 90 = 0
q2 := 90
q2real := q2 = 90
q0rad := q0real*π/180 = -0.785398
q1rad := q1real*π/180 = 0
q0 := 90
q1 := 90
q2rad := q2real*π/180 = 1.5708
q2 := 90
Bp := OA + AB*cos(q1rad) = 85.5
Cp := Bp + BC*cos(π - q1rad - q2rad) = 85.5
Ap := OA = 41.5
Ax := Ap*cos(q0rad) = 29.3449
Bx := Bp*cos(q0rad) = 60.4576
Cx := Cp*cos(q0rad) = 60.4576
Ay := Ap*sin(q0rad) = -29.3449
By := Bp*sin(q0rad) = -60.4576
Cy := Cp*sin(q0rad) = -60.4576
Az := 0
Bz := AB*sin(q1rad) = 0
Cz := Bz - BC*sin(π - q1rad - q2rad) = -81.32
Cx = 60.4576
Cy = -60.4576
CoordY := [0; Ay; By; Cy]
CoordX := [0; Ax; Bx; Cx]
CoordZ := [0; Az; Bz; Cz] = [0; 0; 0; -81.32]
CoordP := [0; Ap; Bp; Cp] = [0; 41.5; 85.5; 85.5]
Cz = -81.32
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