# Hexapod 2G
# Обратная задача кинематики
# Константы (длины звеньев)
# Точка назначения
# (координаты конца лапы)
# Версия 1
OA := 37
AB := 44
BC := 83
Destination := [70; 70; -50]  # Версия 2
OA := 41.5
AB := 44
BC := 81.32
x := Destination[0] = 70
y := Destination[1] = 70
z := Destination[2] = -50  # Решение для передней правой лапы
p := sqrt(x^2 + y^2) = 98.9949
OC := sqrt(p^2 + z^2) = 110.905
AC := sqrt((p - OA)^2 + z^2) = 76.1949
Qrad := atan(z/(p - OA)) = -0.715787
Q0rad := acos((AB^2 + AC^2 - BC^2)/(2*AB*AC)) = 1.40165
q0rad := atan(y/x) = 0.785398
q1rad := Qrad + Q0rad = 0.685867
q2rad := acos((AB^2 + BC^2 - AC^2)/(2*AB*BC)) = 1.17738
q0real := q0rad*180/π = 45
q1real := q1rad*180/π = 39.2973
q2real := q2rad*180/π = 67.459
q0 := q0real + 45 = 90
q1 := q1real + 90 = 129.297
q2 := q2real = 67.459
Ap := OA
Bp := OA + AB*cos(q1rad) = 75.5503
Cp := p = 98.9949
Ax := OA*cos(q0rad) = 29.3449
Bx := Bp*cos(q0rad) = 53.4221
Cx := x = 70
Ay := OA*sin(q0rad) = 29.3449
By := Bp*sin(q0rad) = 53.4221
Cy := y = 70
Az := 0
Bz := AB*sin(q1rad) = 27.8671
Cz := z = -50
CoordY := [0; Ay; By; Cy] = [0; 29.3449; 53.4221; 70]
CoordX := [0; Ax; Bx; Cx] = [0; 29.3449; 53.4221; 70]
CoordZ := [0; Az; Bz; Cz] = [0; 0; 27.8671; -50]
CoordP := [0; Ap; Bp; Cp] = [0; 41.5; 75.5503; 98.9949]
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# Решение прямой задачи кинематики
q0 := 90
q1 := 90
q0real := q0 - 45 = 45
q2 := 90
q1real := q1 - 90 = 0
q2real := q2 = 90
q0rad := q0real*π/180 = 0.785398
q0 := 90
q1rad := q1real*π/180 = 0
q1 := 153.605
q2 := 45.519
q2rad := q2real*π/180 = 1.5708
Bp := OA + AB*cos(q1rad) = 85.5
Cp := Bp + BC*cos(π - q1rad - q2rad) = 85.5
Ap := OA = 41.5
Ax := Ap*cos(q0rad) = 29.3449
Bx := Bp*cos(q0rad) = 60.4576
Cx := Cp*cos(q0rad) = 60.4576
Ay := Ap*sin(q0rad) = 29.3449
By := Bp*sin(q0rad) = 60.4576
Cy := Cp*sin(q0rad) = 60.4576
Az := 0
Bz := AB*sin(q1rad) = 0
Cz := Bz - BC*sin(π - q1rad - q2rad) = -81.32
Cx = 60.4576
CoordY := [0; Ay; By; Cy] = [0; 29.3449; 60.4576; 60.4576]
CoordX := [0; Ax; Bx; Cx] = [0; 29.3449; 60.4576; 60.4576]
Cy = 60.4576
CoordZ := [0; Az; Bz; Cz] = [0; 0; 0; -81.32]
CoordP := [0; Ap; Bp; Cp] = [0; 41.5; 85.5; 85.5]
Cz = -81.32
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