# Hexapod 2G
# Обратная задача кинематики
# Константы (длины звеньев)
# Точка назначения
# (координаты конца лапы)
OA := 37
AB := 44
BC := 83
Destination := [-50; 50; -50]
x := Destination[0] = -50
y := Destination[1] = 50  # Решение для центральной левой лапы
z := Destination[2] = -50
p := sqrt(x^2 + y^2) = 70.7107
OC := sqrt(p^2 + z^2) = 86.6025
AC := sqrt((p - OA)^2 + z^2) = 60.3027
Qrad := atan(z/(p - OA)) = -0.977587
Q0rad := acos((AB^2 + AC^2 - BC^2)/(2*AB*AC)) = 1.82152
q0rad := atan(y/x) + π = 2.35619
q1rad := Qrad + Q0rad = 0.84393
q2rad := acos((AB^2 + BC^2 - AC^2)/(2*AB*BC)) = 0.780763
q0real := q0rad*180/π = 135
q1real := q1rad*180/π = 48.3537
q2real := q2rad*180/π = 44.7344
q0 := q0real - 90 = 45
q1 := q1real + 90 = 138.354
q2 := q2real = 44.7344
Ap := OA
Bp := OA + AB*cos(q1rad) = 66.2394
Cp := p = 70.7107
Ax := OA*cos(q0rad) = -26.163
Bx := Bp*cos(q0rad) = -46.8383
Cx := x = -50
Ay := OA*sin(q0rad) = 26.163
By := Bp*sin(q0rad) = 46.8383
Cy := y = 50
Az := 0
Bz := AB*sin(q1rad) = 32.8795
Cz := z = -50
CoordX := [0; Ax; Bx; Cx] = [0; -26.163; -46.8383; -50]
CoordY := [0; Ay; By; Cy] = [0; 26.163; 46.8383; 50]
CoordZ := [0; Az; Bz; Cz] = [0; 0; 32.8795; -50]
CoordP := [0; Ap; Bp; Cp] = [0; 37; 66.2394; 70.7107]
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# Решение прямой задачи кинематики
q0 := 90
q0real := q0 + 90 = 180
q1 := 90
q1real := q1 - 90 = 0
q2 := 90
q2real := q2 = 90
q0rad := q0real*π/180 = 3.14159
q1rad := q1real*π/180 = 0
q0 := 90
q1 := 90
q2rad := q2real*π/180 = 1.5708
q2 := 90
Bp := OA + AB*cos(q1rad) = 81
Cp := Bp + BC*cos(π - q1rad - q2rad) = 81
Ap := OA = 37
Ax := Ap*cos(q0rad) = -37
Bx := Bp*cos(q0rad) = -81
Cx := Cp*cos(q0rad) = -81
Ay := Ap*sin(q0rad) = 4.53104e-15
By := Bp*sin(q0rad) = 9.91931e-15
Cy := Cp*sin(q0rad) = 9.91931e-15
Az := 0
Bz := AB*sin(q1rad) = 0
Cz := Bz - BC*sin(π - q1rad - q2rad) = -83
Cx = -81
CoordY := [0; Ay; By; Cy] = [0; 4.53104e-15; 9.91931e-15; 9.91931e-15]
CoordX := [0; Ax; Bx; Cx] = [0; -37; -81; -81]
Cy = 9.91931e-15
CoordZ := [0; Az; Bz; Cz] = [0; 0; 0; -83]
CoordP := [0; Ap; Bp; Cp] = [0; 37; 81; 81]
Cz = -83
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