# Hexapod 2G
# Обратная задача кинематики
# Константы (длины звеньев)
# Точка назначения
# (координаты конца лапы)
OA := 37
AB := 45
BC := 85
Destination := [60; 60; -40]
x := Destination[0] = 60
y := Destination[1] = 60
z := Destination[2] = -40
p := sqrt(x^2 + y^2) = 84.8528
OC := sqrt(p^2 + z^2) = 93.8083
AC := sqrt((p - OA)^2 + z^2) = 62.369
Qrad := atan(z/(p - OA)) = -0.696249
Q0rad := acos((AB^2 + AC^2 - BC^2)/(2*AB*AC)) = 1.80637
q0rad := atan(y/x) = 0.785398
q1rad := Qrad + Q0rad = 1.11012
q2rad := acos((AB^2 + BC^2 - AC^2)/(2*AB*BC)) = 0.794463
q0real := q0rad*180/π = 45
q1real := q1rad*180/π = 63.605
q2real := q2rad*180/π = 45.5194
q0 := q0real + 45 = 90
q1 := q1real + 90 = 153.605
q2 := q2real = 45.5194
Ap := OA
Bp := OA + AB*cos(q1rad) = 57.005
Cp := p = 84.8528
Ax := OA*cos(q0rad) = 26.163
Bx := Bp*cos(q0rad) = 40.3086
Cx := x = 60
Ay := OA*sin(q0rad) = 26.163
By := Bp*sin(q0rad) = 40.3086
Cy := y = 60
Az := 0
Bz := AB*sin(q1rad) = 40.3088
Cz := z = -40
CoordY := [0; Ay; By; Cy]
CoordX := [0; Ax; Bx; Cx]
CoordZ := [0; Az; Bz; Cz] = [0; 0; 40.3088; -40]
CoordP := [0; Ap; Bp; Cp] = [0; 37; 57.005; 84.8528]
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# Решение прямой задачи кинематики
q0 := 90
q0real := q0 - 45 = 45
q1 := 153.605
q1real := q1 - 90 = 63.605
q2 := 45.519
q2real := q2 = 45.519
q0rad := q0real*π/180 = 0.785398
q1rad := q1real*π/180 = 1.11012
q2rad := q2real*π/180 = 0.794456
Bp := OA + AB*cos(q1rad) = 57.0051
Cp := Bp + BC*cos(π - q1rad - q2rad) = 84.8522
Ap := OA = 37
Ax := Ap*cos(q0rad) = 26.163
Bx := Bp*cos(q0rad) = 40.3087
Cx := Cp*cos(q0rad) = 59.9996
Ay := Ap*sin(q0rad) = 26.163
By := Bp*sin(q0rad) = 40.3087
Cy := Cp*sin(q0rad) = 59.9996
Az := 0
Bz := AB*sin(q1rad) = 40.3088
Cz := Bz - BC*sin(π - q1rad - q2rad) = -40.0002
Cx = 59.9996
Cy = 59.9996
CoordY := [0; Ay; By; Cy]
CoordX := [0; Ax; Bx; Cx]
CoordZ := [0; Az; Bz; Cz] = [0; 0; 40.3088; -40.0002]
CoordP := [0; Ap; Bp; Cp] = [0; 37; 57.0051; 84.8522]
Cz = -40.0002
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sqrt((Cp - Bp)^2 + (Bz - Cz)^2) = 85
