# Поворот амплитуды
Amplitude := 60
Vy := 10
Vx := 10
Xamp := Amplitude/2*sin(atan(Vy/Vx)) = 21.2132
Yamp := Amplitude/2*cos(atan(Vy/Vx)) = 21.2132
X := [Xamp; -Xamp]
Y := [Yamp; -Yamp]
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H := 70
dH := 25
D := 70
Kx := 4*dH/D^2 = 0.0204082
Ky := 4*dH/D^2 = 0.0204082
z(x, y) := -Kx*(x - 40)^2 - Ky*(y - 40)^2 - H + dH
# [component: inputs z]
z1(x, y) := -x^2 - y^2
# [component: inputs z1]
y(x)
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